# Лабораторна робота №2
# Варіант №23
# Виконала: Павлова Софія, ІС-12
# 1. Позначимо матрицю системи А:
k := 2
a := 0.25*k
a = 0.5
A := [
    5.18 + a, 1.12, 0.95, 1.32, 0.83;
    1.12, 4.28 - a, 2.12, 0.57, 0.91;
    0.95, 2.12, 6.13 + a, 1.29, 1.57;
    1.32, 0.57, 1.29, 4.57 - a, 1.25;
    0.83, 0.91, 1.57, 1.25, 5.21 + a
]
A = [
    5.68, 1.12, 0.95, 1.32, 0.83;
    1.12, 3.78, 2.12, 0.57, 0.91;
    0.95, 2.12, 6.63, 1.29, 1.57;
    1.32, 0.57, 1.29, 4.07, 1.25;
    0.83, 0.91, 1.57, 1.25, 5.71
]
# 2. Позначимо вектор правої частини В:
b := 0.35*k
b = 0.7
B := [6.19 + b; 3.21; 4.28 - b; 6.25; 4.95 + b]
B = [6.89; 3.21; 3.58; 6.25; 5.65]
# 3. Знайдемо розв'язок СЛАР за допомогою вбудованої функції lsolve(M, v):
# , де М - матриця дійсних чисел
# , а v - вектор дійсних чисел.
X := lsolve(A, B) = [0.823737; 0.31733; -0.0248144; 1.04871; 0.596426]
X = [0.823737; 0.31733; -0.0248144; 1.04871; 0.596426]
# 4. Перевіримо правильність розрахунків. Підставивши початкові значення матриць у рівняння A*X=B, маємо одержати правильну рівність:
A*X = [6.89; 3.21; 3.58; 6.25; 5.65]
B = [6.89; 3.21; 3.58; 6.25; 5.65]
# 5. Створімо вектор нев'язки R=B-A*X:
R := B - A*X
R = [0; 8.88178e-16; 4.44089e-16; 8.88178e-16; 8.88178e-16]
