# Лабораторна робота №3
# Варіант №23
# Виконала: Павлова Софія, ІС-12
# 1. Позначимо матрицю системи А:
k := 1
a := 0.2
A := [
    8.30, 2.62 + a, 4.10, 1.90;
    3.92, 8.45, 8.78 - a, 2.46;
    3.77, 7.21 + a, 8.04, 2.28;
    2.21, 3.65 - a, 1.69, 6.99
]
A = [8.3, 2.82, 4.1, 1.9; 3.92, 8.45, 8.58, 2.46; 3.77, 7.41, 8.04, 2.28; 2.21, 3.45, 1.69, 6.99]
# 2. Позначимо вектор правої частини В:
B := [-10.65 + a; 12.21; 15.45 - a; -8.35]
B = [-10.45; 12.21; 15.25; -8.35]
# 3. Перевіримо матрицю А на домінантність головної діагоналі:
A_sumRow1 := A[0, 1] + A[0, 2] + A[0, 3] = 8.82
A[0, 0] = 8.3
A[0, 0] > A_sumRow1 = 0
A_sumRow2 := A[1, 0] + A[1, 2] + A[1, 3] = 14.96
A[1, 1] = 8.45
A[1, 1] > A_sumRow2 = 0
A_sumRow3 := A[2, 0] + A[2, 1] + A[2, 3] = 13.46
A[2, 2] = 8.04
A[2, 2] > A_sumRow3 = 0
A_sumRow4 := A[3, 0] + A[3, 1] + A[3, 2] = 7.35
A[3, 3] = 6.99
A[3, 3] > A_sumRow4 = 0
# Отже, матриця А не має домінантної головної діагоналі.
# 4. Зведемо матрицю А до еквівалентної з домінантною головною діагоналлю:
A1 := A[0, :] = [8.3, 2.82, 4.1, 1.9]
B1 := B[0] = -10.45
A2 := A[1, :] = [3.92, 8.45, 8.58, 2.46]
B2 := B[1] = 12.21
A3 := A[2, :] = [3.77, 7.41, 8.04, 2.28]
B3 := B[2] = 15.25
A4 := A[3, :] = [2.21, 3.45, 1.69, 6.99]
B4 := B[3] = -8.35
# Виконаємо наступні елементарні перетворення з рядками матриці А, щоб у результаті отримати матрицю з домінантною головною діагоналлю:
# Для першого рядку:
mod_A1 := A1 - A2 + A3 = [8.15, 1.78, 3.56, 1.72]
mod_B1 := B1 - B2 + B3 = -7.41
# Для другого рядку:
mod_A2 := A2 - A3 = [0.15, 1.04, 0.54, 0.18]
mod_B2 := B2 - B3 = -3.04
# Для третього рядку:
mod_A3 := 8*A3 - 7*A2 = [2.72, 0.13, 4.26, 1.02]
mod_B3 := 8*B3 - 7*B2 = 36.53
# Для четвертого рядку:
mod_A4 := 2*A4 - A3 = [0.65, -0.51, -4.66, 11.7]
mod_B4 := 2*B4 - B3 = -31.95
# Отримаємо еквівалентну матрицю:
eq_A := [8.15, 1.78, 3.56, 1.72; 0.15, 1.04, 0.54, 0.18; 2.72, 0.13, 4.26, 1.02; 0.65, -0.51, -4.66, 11.7]
eq_B := [-7.41; -3.04; 36.53; -31.95]
# 5. Перевіримо матрицю eq_А на домінантність головної діагоналі:
eq_A_sumRow1 := eq_A[0, 1] + eq_A[0, 2] + eq_A[0, 3] = 7.06
eq_A[0, 0] = 8.15
eq_A_sumRow2 := eq_A[1, 0] + eq_A[1, 2] + eq_A[1, 3] = 0.87
eq_A[1, 1] = 1.04
eq_A_sumRow3 := eq_A[2, 0] + eq_A[2, 1] + eq_A[2, 3] = 3.87
eq_A[2, 2] = 4.26
eq_A_sumRow4 := eq_A[3, 0] + eq_A[3, 1] + eq_A[3, 2] = -4.52
eq_A[3, 3] = 11.7
eq_A[0, 0] > eq_A_sumRow1 = 1
eq_A[1, 1] > eq_A_sumRow2 = 1
eq_A[2, 2] > eq_A_sumRow3 = 1
eq_A[3, 3] > eq_A_sumRow4 = 1
# Отже, матриця eq_А має домінантну головну діагональ.
# 6. Задамо початкові дані, необхідні для виконання першої ітерації:
X1 := 0
X2 := 0
X3 := 0
X4 := 0
x1 := 0
x2 := 0
x3 := 0
x4 := 0
# Задамо точність обрахунків:
e := 10^-6
# Задамо формулу Зейделя:
Zeydel(K1, K2, K3, K4, e, M, w) :=
    while e < M
        k1 ← K1
        k2 ← K2
        k3 ← K3
        k4 ← K4
        K1 ← (-7.41 - 1.78*K2 - 3.56*K3 - 1.72*K4)/8.15
        K2 ← (-3.04 - 0.15*K1 - 0.54*K3 - 0.18*K4)/1.04
        K3 ← (36.53 - 2.72*K1 - 0.13*K2 - 1.02*K4)/4.26
        K4 ← (-31.95 - 0.65*K1 + 0.51*K2 + 4.66*K3)/11.7
        m ← [abs(k1 - K1); abs(k2 - K2); abs(k3 - K3); abs(k4 - K4)]
        M ← max(m)
        w ← w + 1
    [K1; K2; K3; K4; M; w]
# 7. Виконаємо першу ітерацію:
x1 := X1
X1 := (-7.41 - 1.78*X2 - 3.56*X3 - 1.72*X4)/8.15
x2 := X2
X2 := (-3.04 - 0.15*X1 - 0.54*X3 - 0.18*X4)/1.04
x3 := X3
X3 := (36.53 - 2.72*X1 - 0.13*X2 - 1.02*X4)/4.26
x4 := X4
X4 := (-31.95 - 0.65*X1 + 0.51*X2 + 4.66*X3)/11.7
# Знайдемо різницю 1 та 0 ітерацій:
d := [abs(x1 - X1); abs(x2 - X2); abs(x3 - X3); abs(x4 - X4)]
D := max(d)
X := [X1; X2; X3; X4]
x := [x1; x2; x3; x4]
# Результати першої ітерації:
D = 9.24084
x = [0; 0; 0; 0]
X = [-0.909202; -2.79194; 9.24084; 0.878582]
d = [0.909202; 2.79194; 9.24084; 0.878582]
e ≥ D = 0
# Знайдемо вектор нев'язки для першої ітерації:
Rm1 := eq_B - eq_A*X = [-29.4389; -5.1482; -0.896154; 0]
# 8. Застосуємо формулу Зейделя для наступних ітерацій:
Zeydel(X1, X2, X3, X4, e, D, 1) = [-4.3049; -8.39292; 11.1963; 1.60194; 2.48921e-7; 15]
# 8. Переконаймось, що обрана точність досягнута:
2.489*10^-7 < e = 1
# 9. Запишемо розв'язок системи:
X := [-4.305 + (-10^-6); -8.393 + (-10^-6); 11.196 + (-10^-6); 1.602 + (-10^-6)]
# 10. Знайдемо вектор нев'язки кожної ітерації Rm:
# Так, як за формулою Зейделя ми отримали лише кінцеве значення Х, то створимо формулу, що буде шукати одразу вектор нев'язки на конкретній ітерації:
Nevyazka(K1, K2, K3, K4, n) :=
    for i ∈ 0 .. n - 1
        K1 ← (-7.41 - 1.78*K2 - 3.56*K3 - 1.72*K4)/8.15
        K2 ← (-3.04 - 0.15*K1 - 0.54*K3 - 0.18*K4)/1.04
        K3 ← (36.53 - 2.72*K1 - 0.13*K2 - 1.02*K4)/4.26
        K4 ← (-31.95 - 0.65*K1 + 0.51*K2 + 4.66*K3)/11.7
        K ← [K1; K2; K3; K4]
        Rm ← eq_B - eq_A*K
    Rm
Rm2 := Nevyazka(X1, X2, X3, X4, 1) = [-1.6004; -1.36614; -0.914172; 0]
Rm3 := Nevyazka(X1, X2, X3, X4, 2) = [2.5776; 0.0387002; 0.0663271; 0]
Rm4 := Nevyazka(X1, X2, X3, X4, 3) = [0.835866; 0.117072; 0.0939047; 0]
Rm5 := Nevyazka(X1, X2, X3, X4, 4) = [0.0255036; 0.0286562; 0.0203249; 3.55271e-15]
Rm6 := Nevyazka(X1, X2, X3, X4, 5) = [-0.0582366; -0.0013717; -0.00181827; 3.55271e-15]
Rm7 := Nevyazka(X1, X2, X3, X4, 6) = [-0.0177413; -0.0026043; -0.00207579; -3.55271e-15]
Rm8 := Nevyazka(X1, X2, X3, X4, 7) = [-0.000260756; -0.000597601; -0.000419829; -3.55271e-15]
Rm9 := Nevyazka(X1, X2, X3, X4, 8) = [0.00131208; 4.12996e-5; 4.82015e-5; -3.55271e-15]
Rm10 := Nevyazka(X1, X2, X3, X4, 9) = [0.000375257; 5.77445e-5; 4.57574e-5; 3.55271e-15]
Rm11 := Nevyazka(X1, X2, X3, X4, 10) = [-7.4086e-7; 1.24021e-5; 8.62157e-6; 3.55271e-15]
Rm12 := Nevyazka(X1, X2, X3, X4, 11) = [-2.9445e-5; -1.1452e-6; -1.23372e-6; -3.55271e-15]
Rm13 := Nevyazka(X1, X2, X3, X4, 12) = [-7.90755e-6; -1.27632e-6; -1.00564e-6; -3.55271e-15]
Rm14 := Nevyazka(X1, X2, X3, X4, 13) = [1.5561e-7; -2.56014e-7; -1.75892e-7; -3.55271e-15]
Rm15 := Nevyazka(X1, X2, X3, X4, 14) = [6.58347e-7; 3.02109e-8; 3.07901e-8; -3.55271e-15]
