# Worksheet setting: ORIGIN = 1
# Лабораторна робота №4
# Варіант №23
# Виконала: Павлова Софія, ІС-12
# 1. Позначимо матрицю системи А:
t := 3
d := 0.015*t = 0.045
k := 3*(2 - 4) + 2 = -4
a := 0.11*t = 0.33
b := 0.02*k = -0.08
g := b = -0.08
A := [
    6.26 + a, 1.1 - b, 0.97 + g, 1.24 - d;
    1.1 - b, 4.16 - a, 1.3, 0.16;
    0.97 + g, 1.3, 5.44 + a, 2.1;
    1.24 - d, 0.16, 2.1, 6.1 - a
]
A = [6.59, 1.18, 0.89, 1.195; 1.18, 3.83, 1.3, 0.16; 0.89, 1.3, 5.77, 2.1; 1.195, 0.16, 2.1, 5.77]
# 2. Зведемо матрицю А до нормальної форми Форбеніуса:
# Етап 1:
M3 := [
    1, 0, 0, 0;
    0, 1, 0, 0;
    A[4, 1]/(-A[4, 3]), A[4, 2]/(-A[4, 3]), 1/A[4, 3], A[4, 4]/(-A[4, 3]);
    0, 0, 0, 1
]
M3 = [1, 0, 0, 0; 0, 1, 0, 0; -0.569048, -0.0761905, 0.47619, -2.74762; 0, 0, 0, 1]
A1 := M3^-1*A*M3
M3^-1 = [1, 0, 0, 0; 0, 1, 0, 0; 1.195, 0.16, 2.1, 5.77; 0, 0, 0, 1]
A1 = [
    6.08355, 1.11219, 0.42381, -1.25038;
    0.440238, 3.73095, 0.619048, -3.4119;
    2.31413, 3.73282, 12.1455, -30.923;
    0, 0, 1, 0
]
# Етап 2:
M2 := [
    1, 0, 0, 0;
    A1[3, 1]/(-A1[3, 2]), 1/A1[3, 2], A1[3, 3]/(-A1[3, 2]), A1[3, 4]/(-A1[3, 2]);
    0, 0, 1, 0;
    0, 0, 0, 1
]
M2 = [1, 0, 0, 0; -0.619941, 0.267894, -3.25371, 8.28409; 0, 0, 1, 0; 0, 0, 0, 1]
A2 := M2^-1*A1*M2
M2^-1 = [1, 0, 0, 0; 2.31413, 3.73282, 12.1455, -30.923; 0, 0, 1, 0; 0, 0, 0, 1]
A2 = [5.39406, 0.297949, -3.19493, 7.9631; 5.49196, 16.5659, -81.32, 121.064; 0, 1, 0, 0; 0, 0, 1, 0]
# Етап 3:
M1 := [
    1/A2[2, 1], A2[2, 2]/(-A2[2, 1]), A2[2, 3]/(-A2[2, 1]), A2[2, 4]/(-A2[2, 1]);
    0, 1, 0, 0;
    0, 0, 1, 0;
    0, 0, 0, 1
]
M1 = [0.182084, -3.0164, 14.8071, -22.0438; 0, 1, 0, 0; 0, 0, 1, 0; 0, 0, 0, 1]
A3 := M1^-1*A2*M1
M1^-1 = [5.49196, 16.5659, -81.32, 121.064; 0, 1, 0, 0; 0, 0, 1, 0; 0, 0, 0, 1]
A3 = [21.96, -169.041, 542.162, -609.292; 1, 0, 0, 0; 0, 1, 0, 0; 0, 0, 1, 0]
# Отримали матрицю P, що має нормальну форму Форбеніуса. Матриця P подібна до матриці A.
P := A3 = [21.96, -169.041, 542.162, -609.292; 1, 0, 0, 0; 0, 1, 0, 0; 0, 0, 1, 0]
# Перевіримо правильність знаходження матриці P.
# Відповідні значення матриці P мають збігатися зі значеннями добутку матриць:
M1^-1*M2^-1*M3^-1*A*M3*M2*M1 = [21.96, -169.041, 542.162, -609.292; 1, 0, 0, 0; 0, 1, 0, 0; 0, 0, 1, 0]
# Бачимо, що значення сходяться, проте присутня допустима похибка.
# Отже матрицю P знайдено правильно.
# 3. Знайдемо власні значення як корені характеристичного рівняння(з даних Mathcad):
# Перший рядок матриці P визначає коефіцієнти при степенях λ характеристичного рівняння
λ^4 - 21.96*λ^3 + 169.041*λ^2 - 542.162*λ + 609.292
v := [609.29225; -542.16191; 169.04128; -21.96; 1]
λ := polyroots(v)
λ = [2.6589; 4.34625; 5.69198; 9.26287]  # - власні значення, знайдені методом Данилевського
# 4. Знайдемо власні значення (з програми):
# Задамо характеристичне рівняння на основі матриці, отриманої програмно:
λ^4 - 21.96*λ^3 + 169.04128*λ^2 - 542.16191*λ + 609.29226
# - власні значення (за даними з програми), знайдені методом Данилевського
v0 := [609.29226; -542.16191; 169.04128; -21.96; 1]
λ0 := polyroots(v)
λ0 = [2.6589; 4.34625; 5.69198; 9.26287]
# 5. Перевіримо правильність знаходження власних значень матриці А:
# Порівняємо значення λ0 та λ
λ == λ0 = 1
# Бачимо, що вони співпадають, отже власні значення було знайдено правильно.
# 5. Знайдемо власні вектори матриці А (з програми):
# Для початку знайдемо власні вектори матриці, отриманої програмно:
λ1 := 2.658901
y1 := [λ1^3; λ1^2; λ1; 1]
y1 = [18.7978; 7.06975; 2.6589; 1]
λ2 := 4.346248
y2 := [λ2^3; λ2^2; λ2; 1]
y2 = [82.1001; 18.8899; 4.34625; 1]
λ3 := 5.69198
y3 := [λ3^3; λ3^2; λ3; 1]
y3 = [184.412; 32.3986; 5.69198; 1]
λ4 := 9.262871
y4 := [λ4^3; λ4^2; λ4; 1]
y4 = [794.762; 85.8008; 9.26287; 1]
# Знайдемо матриці подібності S:
S := M3*M2*M1
S = [
    0.182084, -3.0164, 14.8071, -22.0438;
    -0.112881, 2.13788, -12.4332, 21.95;
    -0.0950141, 1.55359, -7.00246, 8.12399;
    0, 0, 0, 1
]
# Знайдемо власні вектори матриці A та перевіримо правильність отриманих результатів. Знайдені власні вектори повинні задовольняти наступній рівності:
# А*х1=λ1*х1
x1 := S*y1 = [-0.57566; 1.88362; -1.29741; 1]
A*x1 = [-1.53062; 5.00837; -3.44969; 2.6589]
λ1*x1 = [-1.53062; 5.00837; -3.44969; 2.6589]
x2 := S*y2 = [0.281211; -0.971178; -0.764005; 1]
A*x2 = [1.22223; -4.22099; -3.32056; 4.34625]
λ2*x2 = [1.22221; -4.22098; -3.32056; 4.34625]
x3 := S*y3 = [-1.91076; -0.371985; 1.0785; 1]
A*x3 = [-10.876; -2.11735; 6.13881; 5.69198]
λ3*x3 = [-10.876; -2.11733; 6.13882; 5.69198]
x4 := S*y4 = [1.01661; 0.500702; 1.04663; 1]
A*x4 = [9.41677; 4.6379; 9.69472; 9.26287]
λ4*x4 = [9.4167; 4.63794; 9.69475; 9.26287]
# Бачимо, що знайдені власні вектори задовольняють умову. Отже власні вектори матриці А знайдено правильно.
