# Worksheet setting: ORIGIN = 1
# Лабораторна робота №5
# Варіант №23
# Виконала: Павлова Софія, ІС-12
# 1. Задамо функцію і її графік:
a := 2
k := 4
f(x) := x^2/15 + cos(x + a)
# [plot: f(x) vs x]
# 2. Задамо значення функції у вузлах інтерполяції:
x := [-2; 0; 2; 4; 6]
# - вузли інтерполяції
y := f(x) = [1.26667; -0.416147; -0.386977; 2.02684; 2.2545]  # - значення функції у вузлах інтерполяції
# [plot: f(t), y vs t, x]
# 3. Порівняємо графік функції та графік інтерполяційного поліному, отриманий з програми:
f(x) := x^2/15 + cos(x + a)
# Інтерполяційний поліном отриманий програмно:
P(x) := f(-2)*x*(x - 2)*(x - 4)*(x - 6)/((-2)*(-4)*(-6)*(-8)) + f(0)*(x + 2)*(x - 2)*(x - 4)*(x - 6)/(2*(-2)*(-4)*(-6)) + f(2)*(x + 2)*x*(x - 4)*(x - 6)/(4*2*(-2)*(-4)) + f(4)*(x + 2)*x*(x - 2)*(x - 6)/(6*4*2*(-2)) + f(6)*(x + 2)*x*(x - 2)*(x - 4)/(8*6*4*2)
# [plot: f(t), P(t), y vs t, x]
# Його графік:
# 4. Розрахуємо похибку отримання інтерполяційного поліному відносно точок інтерполяції:
e1 := |f(-2) - P(-2)| = 0
e4 := |f(4) - P(4)| = 0
e2 := |f(0) - P(0)| = 0
e5 := |f(6) - P(6)| = 0
e3 := |f(2) - P(2)| = 0
# 5. За допомогою засобів Mathcad знайдемо сплайн інтерполяції:
x = [-2; 0; 2; 4; 6]  # - інтервали інтерполювання
y = [1.26667; -0.416147; -0.386977; 2.02684; 2.2545]  # - значення функцій у точках інтерполяції
# Оскільки на всіх вказаних проміжках застосовується одна й та ж функція, то знайдемо сплайни на єдиному проміжку t, заданому з кроком 0.05:
t := -2, -1.95 .. 6
s := cspline(x, y)
A(t) := interp(s, x, y, t)
# [plot: y, f(t), A(t) vs x, t]
# 6. За допомогою засобів Mathcad побудуємо порівняльний графік функції та сплайн інтерполяції у вузлах інтерполяції:
# 7. Порівняємо графік функції та графік кубічних сплайнів, отриманий з програми:
# З програми було отримано наступні коефіцієнти:
a := [1.26667; -0.41615; -0.38698; 2.02684]
b := [-0.99018; -0.54385; 0.68513; 0.11383]
c := [0; 0.22316; 0.39133; 0]
d := [0.03719; 0.02803; -0.06522; 0]
# Кубічна сплайн інтерполяція набуде вигляду:
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# , де a, b, c, d - коефіцієнти, отримані з програми
# Тоді маємо:
# 1)
x1 := -2, -1.95 .. 0
S1(x1) := a[1] + b[1]*(x1 - x[1]) + c[1]*(x1 - x[1])^2 + d[1]*(x1 - x[1])^3
# 2)
x2 := 0, 0.05 .. 2
S2(x2) := a[2] + b[2]*(x2 - x[2]) + c[2]*(x2 - x[2])^2 + d[2]*(x2 - x[2])^3
# 3)
x3 := 2, 2.05 .. 4
S3(x3) := a[3] + b[3]*(x3 - x[3]) + c[3]*(x3 - x[3])^2 + d[3]*(x3 - x[3])^3
# 4)
x4 := 4, 4.05 .. 6
S4(x4) := a[4] + b[4]*(x4 - x[4]) + c[4]*(x4 - x[4])^2 + d[4]*(x4 - x[4])^3
# Побудуємо графік:
# [plot: S1(x1), S2(x2), S3(x3), S4(x4), f(t), f(x) vs x1, x2, x3, x4, t, x]
# 8. За допомогою засобів Mathcad знайдемо кубічні сплайн інтерполяції:
x = [-2; 0; 2; 4; 6]
y = [1.26667; -0.416147; -0.386977; 2.02684; 2.2545]
# Для цього використаємо наступні вбудовані функції Mathcad:
s1 := lspline(x, y)
A1(t) := interp(s1, x, y, t)
s2 := pspline(x, y)
A2(t) := interp(s2, x, y, t)
s3 := cspline(x, y)
A3(t) := interp(s3, x, y, t)
# 9. За допомогою засобів Mathcad побудуємо порівняльний графік функції та кубічних сплайн інтерполяцій у вузлах інтерполювання:
# [plot: A1(t), A2(t), A3(t), f(t), f(x) vs t, x]
