# Лабораторна робота №6
# Варіант №23
# Виконала: Павлова Софія, ІС-12
# 1. Допрограмний етап: визначення кількості дійсних коренів рівняння
# Відповідно до свого варіанту отримуємо наступне рівняння:
f(x) := x^4 - 3*x^3 + x^2 - 2*x - 2
# За теоремою про число коренів алгебраїчного рівняння маємо:
# Задане рів-ня 4 степеню, отже воно має рівно 4 дійсних або комплексних корені.
# Перевіримо на дійсність усі корені нашого рівняння за наслідком з теореми Гюа про наявність комплексних коренів:
(-3)^2 ≤ 1*1 = 0
1^2 ≤ (-3)*(-2) = 1  # - на цьому кроці виконується нерівність.
(-2)^2 ≤ 1*(-2) = 0
# Отже початкове рівняння має принаймні одну пару комплексних коренів, та відповідно, кількість його дійсних коренів не більше двох.
# 2. Допрограмний етап: відокремлення коренів рівняння
# Використаємо теорему Штурма:
# 1)
f(x) := x^4 - 3*x^3 + x^2 - 2*x - 2
# 2)
f1(x) := 4*x^3 - 9*x^2 + 2*x - 2  # - похідна функції
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# 3) | Остача від ділення f(x) на f1(x):
f(x)
f2(x) := -19/16*x^2 - 9/8*x - 19/8
f1(x)  # Домножимо залишок на 16 і візьмемо його з протилежним знаком:
f2(x) := 19*x^2 + 18*x + 38
f2(x)
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# 4) | Остача від ділення f1(x) на f2(x):
f1(x)
f3(x) := 2208/361*x + 448/19
f2(x)  # Домножимо залишок на 361:
f3(x) := 2208*x + 8512
f3(x)
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# 5) | Остача від ділення f2(x) на f3(x):
f2(x)
f4(x) := 1194910/4761
f3(x)  # Домножимо залишок на обернену величину:
f4(x) := 1
f4(x)
# Отримали наступну систему многочленів Штурма:
f(x) := x^4 - 3*x^3 + x^2 - 2*x - 2
f1(x) := 4*x^3 - 9*x^2 + 2*x - 2
f2(x) := 19*x^2 + 18*x + 38
f3(x) := 2208*x + 8512
f4(x) := 1
# Визначимо знаки цих многочленів при x = −∞ та при x =∞:
# При цьому достатньо подивитись на коефіцієнти при найстарших степенях і чи є ці степені парними чи непарними.
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# n - кількість змін знаків
n1 := 3
n2 := 1
# Висновок: многочлен має рівно
n1 - n2 = 2  # дійсні корені
# Локалізуємо корені:
# Для цього продовжимо таблиці, обираючи довільним чином точки для перевірки знаків многочленів системи. Першу точку необхідно взяти такою, щоб набір плюсів та мінусів був однаковим з -∞ . Наступні точки доцільно обирати такими, щоб кількість змін знаків змінювалась, причому таких змін має бути рівно стільки, скільки коренів має многочлен.
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# Бачимо, що на проміжку від -1 до 0 кількість змін знаків зменшилась на 1, отже на цьому проміжку лежить 1 корінь. На проміжку від 2 до 3 така сама ситуація, отже другий дійсний корінь знаходиться там.
# Отже -1<x1<0, 2<x2<3
# 3. Допрограмний етап: перевірка правильності відокремлення коренів рівняння графічним методом:
# Використаємо графічний метод відокремлення коренів:
f(x) := x^4 - 3*x^3 + x^2 - 2*x - 2
# [plot: f(x) vs x]
# Задамо еквівалентне рівняння типу φ1(x) - φ2(x)=0
# Запишемо дане рівняння у вигляді
x^4 - 3*x^3 + x^2
# =
2*x + 2
# Розглянемо дві функції φ1(x) := x^4 - 3*x^3 + x^2та φ2(x) := 2*x + 2
φ1(x) := x^4 - 3*x^3 + x^2
φ2(x) := 2*x + 2
# [plot: φ1(x), φ2(x) vs x]
# Побудуємо графіки цих функцій і визначимо абсциси точок їх перетину:
# Графіки перетинаються в 2 точках, а отже рівняння має 2 дійсні корені.
# Причому один з коренів додатній, а один від'ємний.
# Межі в яких вони лежать: -0.8<x1<-0.4, 2.7<x2<3.1
# Отже перший корінь
# другий корінь
x1 ∈ [-0.8*; - 0.4]  # ,
x2 ∈ [2.7*;3.1]
# 4. Розв’язок уточнення коренів за методами бісекції, хорд, Ньютона:
f(x) := x^4 - 3*x^3 + x^2 - 2*x - 2
f1(x) := 4*x^3 - 9*x^2 + 2*x - 2  # - похідна функції
e := 0.00001  # - точність обрахунків
# Задамо функцію обчислення кореня на вказаному проміжку методом бісекції:
Bisectcia(a, b) :=
    while |a - b| > e
        c ← (a + b)/2
        if f(a)*f(c) > 0
            a ← c
        else
            b ← c
    return (a + b)/2
# Задамо функцію обчислення кореня на вказаному проміжку методом хорд:
Horda(a, b) :=
    while |a - b| > e
        c ← b
        b ← a
        a ← b - (c - b)*f(b)/(f(c) - f(b))
    return a
# Задамо функцію обчислення кореня на вказаному проміжку методом Ньютона:
Nyuton(b, e) :=
    x1 ← b
    x0 ← b + 2*e
    while |x0 - x1| > e
        x0 ← x1
        x1 ← x0 - f(x0)/f1(x0)
# Знайдемо перший корінь:
a := -0.8
b := -0.4  # - початок та кінець проміжка
f(a) = 2.1856
f(b) = -0.8224  # - значення функції на початку та в кінці проміжка
# Результат знаходження першого кореня:
bis_x1 := Bisectcia(a, b) = -0.551059
hor_x1 := Horda(a, b) = -0.551057
Nyu_x1 := Nyuton(b, e) = -0.551057
# Знайдемо другий корінь:
a := 2.7
b := 3.1  # - початок та кінець проміжка
f(a) = -6.0149
f(b) = 4.3891  # - значення функції на початку та в кінці проміжка
# Результат знаходження першого кореня:
bis_x2 := Bisectcia(a, b) = 2.96676
hor_x2 := Horda(a, b) = 2.96675
Nyu_x2 := Nyuton(b, e) = 2.96675
# 3. Порівняємо результати отримані програмно з розв'язком у Mathcad і знайдемо похибку:
# Значення першого кореня з програми: | Значення другого кореня з програми:
bis_1 := -0.55106
bis_2 := 2.96675
hor_1 := -0.55106
hor_2 := 2.96675
Nyu_1 := -0.55106
Nyu_2 := 2.96675
# Розрахунок відносної похибки:
e_bis_1 := |bis_1 - bis_x1| = 1.04004e-6
e_bis_2 := |bis_2 - bis_x2| = 7.20215e-6
e_hor_1 := |hor_1 - hor_x1| = 2.65875e-6
e_hor_2 := |hor_2 - hor_x2| = 4.24789e-6
e_Nyu_1 := |Nyu_1 - Nyu_x1| = 2.65371e-6
e_Nyu_2 := |Nyu_2 - Nyu_x2| = 4.24671e-6
