# Лабораторна робота №7
# Варіант №23
# Виконала: Павлова Софія, ІС-12
# 1. Задамо підінтегральну функцію і межі інтегрування для методу Симпсона:
a := 0.8
b := 1.6
e := 0.0001
f(x) := log(x^2 + 1)/x
F(x) := integral(f(x), x = a .. b) = 0.25397  # - визначений інтеграл
# 2. Знайдемо крок інтегрування h та кількість кроків n для методу Симпсона:
# За умовою треба знайти значення інтеграла до четвертого знаку після коми. Тому обчислення буде проводитись з округленням до п'ятого, запасного знаку після коми.
# Застосуємо формулу:
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# Для цього продиференціюємо підінтегральну функцію та знайдемо її 4 похідну:
f1(x) := (2*x^2 - ln(x^2 + 1)*(x^2 + 1))/(ln(10)*x^2*(x^2 + 1))
f2(x) := 2*(x^4*ln(x^2 + 1) - 3*x^4 + 2*x^2*ln(x^2 + 1) - x^2 + ln(x^2 + 1))/(ln(10)*x^3*(x^2 + 1)^2)
f3(x) := 2*(-3*x^8*ln(x^2 + 1) + 11*x^8 - 12*x^6*ln(x^2 + 1) + 17*x^6 - 18*x^4*ln(x^2 + 1) + 9*x^4 - 12*x^2*ln(x^2 + 1) + 3*x^2 - 3*ln(x^2 + 1))/(ln(10)*x^4*(x^2 + 1)^4)
f4(x) := 4*(6*x^10*ln(x^2 + 1) - 25*x^10 + 30*x^8*ln(x^2 + 1) - 41*x^8 + 60*x^6*ln(x^2 + 1) - 37*x^6 + 60*x^4*ln(x^2 + 1) - 27*x^4 + 30*x^2*ln(x^2 + 1) - 6*x^2 + 6*ln(x^2 + 1))/(ln(10)*x^5*(x^2 + 1)^5)
# Знайдемо найбільше значення 4-ї похідної на відрізку інтегрування:
# Для цього побудуємо графік 4-ї похідної, щоб визначити, як вона себе поводить на цьому проміжку:
# [plot: f4(x) vs x]
# Бачимо, що найбільшого значення на проміжку інтегрування 4-а похідна набуває в т. x = а = 0.8:
M4 := f4(a) = 0.470079
# Отже гранична абсолютна похибка:
Δn1(n) := (b - a)^5/(180*n^4)*M4
φ := (b - a)^5/180*M4 = 0.000855753
# Отримуємо нерівність:
φ/n^4 ≤ e  # , розв'яжемо її підбором:
n := 1
φ/n^4 ≤ e = 0
n := 2
φ/n^4 ≤ e = 1
# - бачимо, що для n = 2 нерівність виконується.
# Отже нам підходить будь-яке n ≥ 2.
# Отже мінімальна кількість кроків для метода Симпсона = 2.
# Використаємо
n := 8  # - кількість кроків
# Тоді
h := (b - a)/n = 0.1  # - крок
# 3. Задамо Х та Y відповідно до знайденої кількості кроків для методу Симпсона:
x := a, a + h .. b  # - значення х
x = [0.8; 0.9; 1; 1.1; 1.2; 1.3; 1.4; 1.5; 1.6]
f(x) = [0.268555; 0.28631; 0.30103; 0.313084; 0.322825; 0.330579; 0.336637; 0.341256; 0.344656]
# 4. Застосуємо формулу Симпсона для наближеного обчислення інтегралу:
In1 := ((b - a)/(3*n)*(f(0.8) + f(1.6) + 4*(f(0.9) + f(1.1) + f(1.3) + f(1.5)) + 2*(f(1) + f(1.2) + f(1.4)))) = 0.25397
# Отже
In1 := 0.2540
# 5. Знайдемо похибку наближеного обчислення інтегралу методом Симпсона:
Δn1(n) = 2.08924e-7  # - аналітична
e1 := |F(x) - In1| = 2.97268e-5  # - реальна похибка
e1 ≤ Δn1(n) = 0  # - бачимо, що реальна похибка не більша за аналітичну, а отже розрахунки було виконано правильно.
# 6. Застосуємо заміну змінної, щоб звести межі інтегрування для методу Гауса:
# Для того, щоб отримати межі a = -1, b = 1, застосуємо формулу:
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# Отримуємо:
xi(t) := 2.4/2 + 0.8/2*t
# Тоді інтеграл набуває вигляду:
a := -1
b := 1
f(t) := 2/5*(5*log(4*t^2 + 24*t + 61) - 10*log(5))/(6 + 2*t)
F(t) := integral(f(t), t = a .. b) = 0.25397  # - визначений інтеграл
# 6. Знайдемо кількість кроків n для методу Гауса:
# Для цього оцінимо похибку за даною нерівністю:
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# Нехай
n := 2
# Знайдемо 4-ту похідну нової функції на новому проміжку інтегрування:
t := -1, -0.95 .. 1  # - межі інтегрування
_f4(t) := d^4/dt^4(f(t))
# Визначимо поведінку 4-ї похідної на проміжку інтегрування:
# [plot: _f4(t) vs t]
# Для цього побудуємо графік:
# Бачимо, що найбільшого значення на проміжку інтегрування 4-та похідна набуває при x = a = -1.
M2 := _f4(a) = 0.00481361
# Тоді аналітична похибка набуде вигляду:
Δn2 := (n!)^4*(b - a)^(2*n + 1)/((2*n + 1)*(2*n)!^3)*M2
Δn2 = 3.56564e-5
Δn2 ≤ e = 1  # - бачимо, при n = 2 нерівність виконується
# Отже мінімальна кількість кроків для метода Гауса = 2.
# 8. Знайдемо значення X, Y, C  для квадратурної формули Гауса:
# Для нашої кількості кроків n = 2 з таблиці квадратурних коефіцієнтів Гауса, отримуємо:
t1 := -0.57735
# - значення вузлів ti
c1 := 1  # - коефіцієнти Ai = ci
t2 := -t1 = 0.57735
c2 := c1 = 1
t := t1, t2 .. t2
t = [-0.57735; 0.57735]  # - зазначимо межі t
y1 := f(t1) = 0.118711  # - значення функції у вузлах
y2 := f(t2) = 0.135284
# 9. Застосуємо квадратурну формулу Гауса для наближеного обчислення інтегралу:
# Підставляємо знайдені значення в формулу:
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In2 := c1*y1 + c2*y2 = 0.253994
# Отже
In2 := 0.2540
# 10. Знайдемо похибку наближеного обчислення інтегралу методом Гауса:
Δn2 = 3.56564e-5  # - аналітична
e2 := |F(t) - In2| = 2.97268e-5  # - реальна похибка
e2 ≤ Δn2 = 1  # - бачимо, що реальна похибка не більша за аналітичну, а отже розрахунки було виконано правильно.
# 11. Знайдемо похибки розрахунків, виконаних програмно відносно розрахунків у Mathcad:
# З програми отримано:
# Інтеграл за методом Симпсона: | Інтеграл за методом Гауса:
Ip1 := 0.2540
Ip2 := 0.2540
# Отримані у Mathcad результати:
In1 = 0.254
In2 = 0.254
# Похибка:
E1 := |Ip1 - In1| = 0
E2 := |Ip2 - In2| = 0
