# Лабораторна робота №8
# Варіант №23
# Виконала: Павлова Софія, ІС-12
# 1. Задамо вхідні дані:
a := 0
b := 2  # - початок і кінець інтервалу
M := 20  # - кількість кроків
# 2. Використаємо метод Рунге-Кутта для розв'язання рівняння Коші засобами Mathcad:
D0(x, y) := [cos(y[0])/(2.2 + x) + y[0]^2]
y0 := [0]  # - вектор початкового значення функції
# Для цього застосуємо програмні засоби Mathcad, а саме функцію
# rkfixed(y0, t0, t1, M, D), де
# у0 — вектор початкових значень в точці t0 розміру NXI;
# t0 — початкова точка розрахунку,
# t1 — кінцева точка розрахунку,
# M — число кроків, на яких чисельний метод знаходить рішення;
# D — векторна функція розміру N*1 двох аргументів — скалярного t та
# векторного у . При цьому у — шукана векторна функція аргументу t того ж
# розміру N*1.
u0 := rkfixed(y0, a, b, M, D0) = [
    0, 0;
    0.1, 0.0445038;
    0.2, 0.0874196;
    0.3, 0.129189;
    0.4, 0.170225;
    0.5, 0.210927;
    0.6, 0.251688;
    0.7, 0.292911;
    0.8, 0.335022;
    0.9, 0.378481;
    1, 0.423805;
    1.1, 0.471587;
    1.2, 0.52253;
    1.3, 0.577482;
    1.4, 0.637496;
    1.5, 0.703909;
    1.6, 0.778462;
    1.7, 0.863479;
    1.8, 0.962152;
    1.9, 1.07901;
    2, 1.22074
]  # - отримаємо наближені значення рівняння Коші на заданому проміжку методом Рунге-Кутта
# 3. Використаємо метод Адамса для розв'язання рівняння Коші засобами Mathcad:
# Для цього застосуємо програмні засоби Mathcad, а саме функцію
# Adams(y0, t0, t1, M, D), де
# у0 — вектор початкових значень в точці t0 розміру NXI;
# t0 — початкова точка розрахунку,
# t1 — кінцева точка розрахунку,
# M — число кроків, на яких чисельний метод знаходить рішення;
# D — векторна функція розміру N*1 двох аргументів — скалярного t та
# векторного у . При цьому у — шукана векторна функція аргументу t того ж
# розміру N*1.
u1 := Adams(y0, a, b, M, D0) = [
    0, 0;
    0.1, 0.0445038;
    0.2, 0.0874199;
    0.3, 0.129189;
    0.4, 0.170226;
    0.5, 0.210927;
    0.6, 0.251689;
    0.7, 0.292912;
    0.8, 0.335022;
    0.9, 0.378482;
    1, 0.423806;
    1.1, 0.471589;
    1.2, 0.522532;
    1.3, 0.577484;
    1.4, 0.637498;
    1.5, 0.703912;
    1.6, 0.778466;
    1.7, 0.863483;
    1.8, 0.962155;
    1.9, 1.07902;
    2, 1.22074
]  # - отримаємо наближені значення рівняння Коші на заданому проміжку методом Адамса
# 4. Побудуємо графіки порівняння наближення, отриманого методом Рунге-Кутта та Адамса за допомогою засобів Mathcad:
# [3D plot: u0, u1, u0[:, 1]]
# - такого вигляду набуває поверхня Коші
# Для того, щоб побудувати графік наближеного рішення потрібно відокремити одну з двох обмежуючих прямих з попереднього графіка, позначену червоним.
# [plot: u0[:, 1], u1[:, 1] vs u0[:, 0], u1[:, 0]]
# - як видно з графіків, наближення майже співпадають
# 5. Побудуємо графіки наближення, отриманого програмно:
u0_p := [0; 0.044504; 0.087420; 0.129189; 0.170225; 0.210927; 0.251688; 0.292911; 0.335022; 0.378481; 0.423805; 0.471587; 0.522530; 0.577482; 0.637496; 0.703909; 0.778462; 0.863479; 0.962152; 1.017955; 1.079013; 1.146233; 1.220741]
e0_p := [0; -0.008223; -0.006771; -0.005854; -0.005170; -0.004617; -0.003733; -0.003359; -0.003011; -0.002683; -0.002368; -0.002061; -0.001756; -0.001451; -0.001140; -0.001140; -0.000819; -0.000484; -0.000064; 0.000030; 0.000127; 0.000229; 0.000335]
# - наближення та похибка отримані програмно методом Рунге-Кутта
u1_p := [0; 0.044504; 0.087420; 0.129189; 0.170300; 0.210904; 0.251665; 0.292887; 0.334996; 0.378453; 0.423775; 0.471554; 0.522493; 0.577439; 0.637447; 0.703851; 0.778392; 0.863390; 0.962036; 1.078853; 1.220506]
e1_p := [0; -0.008223; -0.006771; -0.003159; -0.002761; -0.002447; -0.002184; -0.001955; -0.001750; -0.001562; -0.001386; -0.001218; -0.001056; -0.000897; -0.000738; -0.000578; -0.000414; -0.000243; -0.000064; 0.000127; 0.000335]
# - наближення та похибка отримані програмно методом Адамса
# [3D plot: u0_p, u1_p]
# - на даному графіку зображено порівняння наближень, отриманих обома методами програмно
# [3D plot: e0_p, e1_p]
# - на даному графіку зображено порівняння похибок, отриманих обома методами програмно
# 6. Розв'яжемо за допомогою засобів Mathcad систему диференціальних рівнянь:
D(x, y) := [y[1]; -y[0] + 0.3*y[1]]
y0 := [0; 0.1]  # - вектор початкових значень
a := 0
b := 20  # - початок і кінець інтервалу
M := 30  # - кількість кроків
# Використаємо для цього метод Рунге-Кутта:
u := rkfixed(y0, a, b, M, D) = [
    0, 0, 0.1;
    0.666667, 0.0683679, 0.0975556;
    1.33333, 0.119371, 0.0484293;
    2, 0.12508, -0.0343659;
    2.66667, 0.0728728, -0.11904;
    3.33333, -0.0252403, -0.165952;
    4, -0.132904, -0.144639;
    4.66667, -0.201284, -0.0502399;
    5.33333, -0.189427, 0.0886014;
    6, -0.0853699, 0.215943
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]
# За отриманими даними побудуємо графіки у0 та фазовий портрет системи:
# [plot: u[:, 1] vs u[:, 0]]
# [plot: u[:, 2] vs u[:, 0]]
# - графіки розв'язку системи
# [plot: u[:, 2] vs u[:, 1]]
# - фазовий портрет системи
